*Heading
** Job name: Job-1 Model name: Model-1
** Generated by: Abaqus/CAE Student Edition 2021
*Preprint, echo=NO, model=NO, history=NO, contact=NO
**
** PARTS
**
*Part, name=Part-1
*End Part
**
**
** ASSEMBLY
**
*Assembly, name=Assembly
**
*Instance, name=Part-1-1, part=Part-1
*Node
      1,          25.,          25.,          50.
      2,          25.,          15.,          50.
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*Element, type=C3D8R
  1,  37,  38,  44,  43,   1,   2,   8,   7
  2,  38,  39,  45,  44,   2,   3,   9,   8
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*Nset, nset=Set-1, generate
   1,  216,    1
*Elset, elset=Set-1, generate
   1,  125,    1
** Section: Section-1
*Solid Section, elset=Set-1, material=Material
,
*End Instance
**
*Nset, nset=Nxfixed, instance=Part-1-1, generate
 1,  4,  1
*Nset, nset=Nyfixed, instance=Part-1-1, generate
 1,  7,  2
*Nset, nset=Nzdisped, instance=Part-1-1
 1, 2, 5, 6
*Nset, nset=Nzfixed, instance=Part-1-1
 3, 4, 7, 8
*End Assembly
**
** MATERIALS
**
*Material, name=Material
*Elastic
 113.8, 0.342
** ----------------------------------------------------------------
**
** STEP: Loads
**
*Step, name=Loads, nlgeom=NO
*Static, direct
0.01, 1.,
**
** BOUNDARY CONDITIONS
**
** Name: BC-1 Type: Displacement/Rotation
*Boundary
Nxfixed, 1, 1
** Name: BC-2 Type: Displacement/Rotation
*Boundary
Nyfixed, 2, 2
** Name: BC-3 Type: Displacement/Rotation
*Boundary
Nzfixed, 3, 3
** Name: BC-4 Type: Displacement/Rotation
*Boundary
Nzdisped, 3, 3, 0.3
**
** OUTPUT REQUESTS
**
*Restart, write, frequency=0
**
** FIELD OUTPUT: F-Output-1
**
*Output, field
*Node Output
U,
*Element Output, directions=YES
PE, PEMAG, S, PEEQ
*Output, history, frequency=0
*End Step
